*Heading
** Job name: Job-1 Model name: Model-1
** Generated by: Abaqus/CAE Learning Edition 2025
*Preprint, echo=NO, model=NO, history=NO, contact=NO
**
** PARTS
**
*Part, name=Coupler
*Node
      1,  -1.45000005,           0.
      2,  -1.32500005,           0.
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*Element, type=R2D2
 1,  1,  2
 2,  2,  3
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*Node
     36,  -1.45000005,           0.,           0.
*Nset, nset=Coupler-RefPt_, internal
36,
*Nset, nset=SliderB
 35,
*Nset, nset=CouplerA
 1,
*Elset, elset=Coupler, generate
  1,  34,   1
*End Part
**
*Part, name=Crank
*End Part
**
**
** ASSEMBLY
**
*Assembly, name=Assembly
**
*Instance, name=Coupler-1, part=Coupler
        3.65,           0.,           0.
*End Instance
**
*Instance, name=Crank-1, part=Crank
*Node
      1, -0.758039892,          0.5
      2, -0.634788215,  0.479166657
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*Element, type=R2D2
 1,  1,  2
 2,  2,  3
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*Node
     26, -0.758039892,          0.5,           0.
*Nset, nset=Crank-1-RefPt_, internal
26,
*Nset, nset=CrankA
 25,
*Nset, nset=CrankO
 1,
*Elset, elset=Crank-1, generate
  1,  24,   1
*End Instance
**
*Node
      1,   2.20000005,           0.,           0.
*Node
      2,   2.20000005,           0.,           0.
*Node
      3,   6.44999981,           0.,           0.
*Node
      4, -0.758039892,          0.5,           0.
*Element, type=CONN2D2
1, 2, 1
*Connector Section, elset=Wire-1-Set-3, behavior=ConnSect-9
Join, Rotation
*Nset, nset=DRIVER
 4,
*Nset, nset=RP1
 1,
*Nset, nset=RP2
 2,
*Nset, nset=RP3
 3,
*Nset, nset=RPACoupler
 1,
*Nset, nset=RPACrank
 2,
*Nset, nset=RPBSlider
 3,
*Nset, nset=Wire-1-Set-3
 1, 2
*Elset, elset=Wire-1-Set-3
 1,
*Surface, type=NODE, name=Coupler-1_CouplerA_CNS_, internal
Coupler-1.CouplerA, 1.
*Surface, type=NODE, name=Crank-1_CrankA_CNS_, internal
Crank-1.CrankA, 1.
*Surface, type=NODE, name=Crank-1_CrankO_CNS_, internal
Crank-1.CrankO, 1.
*Surface, type=NODE, name=Coupler-1_SliderB_CNS_, internal
Coupler-1.SliderB, 1.
*Surface, type=NODE, name=RP3_CNS_, internal
RP3, 1.
*Rigid Body, ref node=Coupler-1.Coupler-RefPt_, elset=Coupler-1.Coupler
*Rigid Body, ref node=Crank-1.Crank-1-RefPt_, elset=Crank-1.Crank-1
** Constraint: RP1
*Coupling, constraint name=RP1, ref node=RP1, surface=Coupler-1_CouplerA_CNS_
*Kinematic
** Constraint: RP2
*Coupling, constraint name=RP2, ref node=RP2, surface=Crank-1_CrankA_CNS_
*Kinematic
** Constraint: RP4
*Coupling, constraint name=RP4, ref node=DRIVER, surface=Crank-1_CrankO_CNS_
*Kinematic
** Constraint: RPBCoupler
*Tie, name=RPBCoupler, adjust=yes
RP3_CNS_, Coupler-1_SliderB_CNS_
*End Assembly
*Connector Behavior, name=ConnSect-9
*Connector Elasticity, component=6
 0.45,
**
** BOUNDARY CONDITIONS
**
** Name: BC-B Type: Displacement/Rotation
*Boundary
RPBSlider, 2, 2
** Name: BC-O Type: Displacement/Rotation
*Boundary
DRIVER, 1, 1
DRIVER, 2, 2
** ----------------------------------------------------------------
**
** STEP: Step-1
**
*Step, name=Step-1, nlgeom=YES, inc=1000
*Static
0.001, 1., 1e-05, 0.01
**
** BOUNDARY CONDITIONS
**
** Name: Rotation_Input Type: Displacement/Rotation
*Boundary
DRIVER, 6, 6, 1.
**
** OUTPUT REQUESTS
**
*Restart, write, frequency=0
**
** FIELD OUTPUT: F-Output-1
**
*Output, field, variable=PRESELECT
**
** HISTORY OUTPUT: H-Output-1
**
*Output, history, variable=PRESELECT
*End Step
