*Heading
** Job name: JobPLS Model name: Model-1
** Generated by: Abaqus/CAE Learning Edition 2025
*Preprint, echo=NO, model=NO, history=NO, contact=NO
**
** PARTS
**
*Part, name=Coupler
*Node
      1,  -1.45000005,           0.
      2,  -1.32500005,           0.
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*Element, type=R2D2
 1,  1,  2
 2,  2,  3
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*Node
     36,   2.79999995,           0.,           0.
*Nset, nset=Coupler-RefPt_, internal
36,
*Nset, nset=SliderB
 35,
*Nset, nset=CouplerA
 1,
*Elset, elset=Coupler, generate
  1,  34,   1
*End Part
**
*Part, name=Crank
*End Part
**
**
** ASSEMBLY
**
*Assembly, name=Assembly
**
*Instance, name=Coupler-1, part=Coupler
        3.65,           0.,           0.
*End Instance
**
*Instance, name=Crank-1, part=Crank
*Node
      1, -0.758039892,          0.5
      2, -0.634788215,  0.479166657
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*Element, type=R2D2
 1,  1,  2
 2,  2,  3
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*Node
     26, -0.758039892,          0.5,           0.
*Nset, nset=Crank-1-RefPt_, internal
26,
*Nset, nset=CrankA
 25,
*Nset, nset=CrankO
 1,
*Elset, elset=Crank-1, generate
  1,  24,   1
*End Instance
**
*Element, type=CONN2D2
5, Coupler-1.1, Crank-1.25
*Connector Section, elset=Wire-2-Set-1, behavior=ConnSect-9
Join, Rotation
*Nset, nset=RPCoupler, instance=Coupler-1
 36,
*Nset, nset=RPCrank, instance=Crank-1
 26,
*Nset, nset=Wire-2-Set-1, instance=Coupler-1
 1,
*Nset, nset=Wire-2-Set-1, instance=Crank-1
 25,
*Elset, elset=Wire-2-Set-1
 5,
*Rigid Body, ref node=Coupler-1.Coupler-RefPt_, elset=Coupler-1.Coupler
*Rigid Body, ref node=Crank-1.Crank-1-RefPt_, elset=Crank-1.Crank-1
*Element, type=MASS, elset=RPCrank_Inertia-1_MASS_
1, Crank-1.26
*Mass, elset=RPCrank_Inertia-1_MASS_
0.001,
*Element, type=ROTARYI, elset=RPCrank_Inertia-1_ROTI_
2, Crank-1.26
*Rotary Inertia, elset=RPCrank_Inertia-1_ROTI_
0., 0., 0.001, 0., 0., 0.
*Element, type=MASS, elset=RPCoupler_Inertia-2_MASS_
3, Coupler-1.36
*Mass, elset=RPCoupler_Inertia-2_MASS_
0.001,
*Element, type=ROTARYI, elset=RPCoupler_Inertia-2_ROTI_
4, Coupler-1.36
*Rotary Inertia, elset=RPCoupler_Inertia-2_ROTI_
0., 0., 0.001, 0., 0., 0.
*End Assembly
*Connector Behavior, name=ConnSect-9
*Connector Elasticity, component=6
 0.45,
*Amplitude, name=Amp-1, definition=SMOOTH STEP
             0.,              0.,             60.,              1.
**
** BOUNDARY CONDITIONS
**
** Name: BC-B Type: Displacement/Rotation
*Boundary
RPCoupler, 2, 2
** Name: BC-O Type: Displacement/Rotation
*Boundary
RPCrank, 1, 1
RPCrank, 2, 2
** ----------------------------------------------------------------
**
** STEP: Step-1
**
*Step, name=Step-1, nlgeom=YES
*Dynamic, Explicit, direct user control
0.001, 60.
*Bulk Viscosity
0.06, 1.2
**
** BOUNDARY CONDITIONS
**
** Name: Input Type: Displacement/Rotation
*Boundary, amplitude=Amp-1
RPCrank, 6, 6, 6.28
**
** OUTPUT REQUESTS
**
*Restart, write, number interval=1, time marks=NO
**
** FIELD OUTPUT: F-Output-1
**
*Output, field, variable=PRESELECT
**
** HISTORY OUTPUT: Torque
**
*Output, history, frequency=100
*Node Output, nset=RPCrank
RM3,
**
** HISTORY OUTPUT: H-Output-1
**
*Output, history, variable=PRESELECT
*End Step
